clear
units metal
atom_style atomic
boundary p p p
read_restart /vast/projects/jcombar1/betty-testing/mitchmar/polymer-lab/runs/fiber-v1/discovery-v2/reference-validation/crystalline-pe-v1/seed-104729/01_ramped.restart
newton on
pair_style airebo/morse 3.0
pair_coeff * * /vast/projects/jcombar1/betty-testing/mitchmar/polymer-lab/vendor/lammps-reference/9e42b6f0f2c68a092d5847d4127a053dc50e126a/CH.airebo-m C H
neighbor 2.0 bin
neigh_modify delay 0 every 1 check yes
timestep 0.0002
reset_timestep 0
fix integrator all npt temp 300.0 300.0 0.1 aniso 0.0 0.0 0.5
fix drift all momentum 100 linear 1 1 1
restart 50000 /vast/projects/jcombar1/betty-testing/mitchmar/polymer-lab/runs/fiber-v1/discovery-v2/reference-validation/crystalline-pe-v1/seed-104729/02_stability.*.restart
thermo 500
thermo_style custom step temp press density lx ly lz pe ke etotal pxx pyy pzz
run 250000
write_restart /vast/projects/jcombar1/betty-testing/mitchmar/polymer-lab/runs/fiber-v1/discovery-v2/reference-validation/crystalline-pe-v1/seed-104729/02_equilibrated.restart
write_data /vast/projects/jcombar1/betty-testing/mitchmar/polymer-lab/runs/fiber-v1/discovery-v2/reference-validation/crystalline-pe-v1/seed-104729/02_equilibrated.data
